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/BATCH
/COM,ANSYS RELEASE 2022 R1           BUILD 22.1      UP20211129       20:58:29
/COM,ANSYS RELEASE 2022 R1           BUILD 22.1      UP20211129       20:58:30
/COM,ANSYS RELEASE 2022 R1           BUILD 22.1      UP20211129       21:08:47
/BATCH
/COM,ANSYS RELEASE 2022 R1           BUILD 22.1      UP20211129       04:19:18
/COM,ANSYS RELEASE 2022 R1           BUILD 22.1      UP20211129       04:19:20
/BATCH
/COM,ANSYS RELEASE 2022 R1           BUILD 22.1      UP20211129       09:26:49
/input,menust,tmp,''
/GST,ON
/PLO,INFO,3
/GRO,CURL,ON
/CPLANE,1
WPSTYLE,,,,,,,,0
RESUME
/COM,ANSYS RELEASE 2022 R1           BUILD 22.1      UP20211129       09:26:53
/POST1
/SHOW,WIN32C
SET,FIRST
/PLOPTS,INFO,3
/CONTOUR,ALL,18
/NUMBER,1
! /UIS,ABORT,1
/SHOW,WIN32
FINISH
/SOL
FINISH
/POST1
/DSCALE,ALL,1
PLESOL, NL,SRAT, 0,1.0
PLESOL, NL,SRAT, 0,1.0
FINISH
! /EXIT,NOSAV
/BATCH
/COM,ANSYS RELEASE 2022 R1           BUILD 22.1      UP20211129       10:07:57
/input,menust,tmp,''
/GST,ON
/PLO,INFO,3
/GRO,CURL,ON
/CPLANE,1
WPSTYLE,,,,,,,,0
RESUME
/COM,ANSYS RELEASE 2022 R1           BUILD 22.1      UP20211129       10:08:47
/POST1
/DSCALE,ALL,1
PLESOL, NL,SRAT, 0,1.0
/EFACET,1
PLNSOL, NL,SRAT, 0,1.0
PLESOL, NL,SRAT, 0,1.0
PLESOL, NL,SRAT, 0,1.0
SET,LIST,999
SET,,, ,,, ,198
SET,LIST,999
SET,,, ,,, ,2
SET,LIST,999
SET,,, ,,, ,198
PLESOL, NL,SRAT, 0,1.0
/SHOW,WIN32C
SET,FIRST
/PLOPTS,INFO,3
/CONTOUR,ALL,18
/NUMBER,1
PLNSOL,NL,SRAT
! /UIS,ABORT,1
/SHOW,WIN32
PLESOL, NL,SRAT, 0,1.0
PLESOL, NL,SRAT, 0,1.0
/EXPAND,1,RECT,FULL,1,0,0, ,RECT,FULL,,,, ,RECT,FULL,,,,
/EXPAND,1,RECT,FULL,10,0,0, ,RECT,FULL,,,, ,RECT,FULL,,,,
/EXPAND,1,RECT,FULL,100,0,0, ,RECT,FULL,,,, ,RECT,FULL,,,,
/EXPAND,1,RECT,FULL,100,100,0, ,RECT,FULL,,,, ,RECT,FULL,,,,
SET,LIST,999
SET,,, ,,, ,198
/EXPAND,1,RECT,FULL,0,0.1,0, ,RECT,FULL,,,, ,RECT,FULL,,,,
/EXPAND,1,RECT,FULL,0,100,0, ,RECT,FULL,,,, ,RECT,FULL,,,,
/EXPAND,1,POLAR,FULL,0,100,0, ,RECT,FULL,,,, ,RECT,FULL,,,,
/EXPAND,1,POLAR,FULL,0,0.01,0, ,RECT,FULL,,,, ,RECT,FULL,,,,
/EXPAND,1,RECT,HALF,0,100,0, ,RECT,FULL,,,, ,RECT,FULL,,,,
/EXPAND,1,RECT,HALF,0,-10,0, ,RECT,FULL,,,, ,RECT,FULL,,,,
/EXPAND,1,RECT,HALF,0,-1,0, ,RECT,FULL,,,, ,RECT,FULL,,,,
/EXPAND,1,RECT,HALF,0,-0.5,0, ,RECT,FULL,,,, ,RECT,FULL,,,,
/EXPAND,1,RECT,HALF,0,-0.1,0, ,RECT,FULL,,,, ,RECT,FULL,,,,
/EXPAND,1,RECT,HALF,0,-0.05,0, ,RECT,FULL,,,, ,RECT,FULL,,,,
/EXPAND,1,RECT,HALF,0,-0.01,0, ,RECT,FULL,,,, ,RECT,FULL,,,,
/EXPAND,1,RECT,HALF,0,-0.000001,0, ,RECT,FULL,,,, ,RECT,FULL,,,,
/EXPAND,1,RECT,HALF,0,-1e-06,0,1,RECT,FULL,-0.00001,0,0, ,RECT,FULL,,,,
/EXPAND,1,RECT,HALF,0,-1e-06,0,1,RECT,HALF,-1e-05,0,0, ,RECT,FULL,,,,
/EXPAND,1,RECT,HALF,0,-1e-06,0,1,RECT,HALF,1,0,0, ,RECT,FULL,,,,
/EXPAND,1,RECT,HALF,0,-1e-06,0,1,RECT,HALF,4,0,0, ,RECT,FULL,,,,
/EXPAND,1,RECT,HALF,0,-1e-06,0,1,RECT,HALF,2,0,0, ,RECT,FULL,,,,
/EXPAND,1,RECT,HALF,0,-1e-06,0,1,RECT,HALF,1,0,0, ,RECT,FULL,,,,
/EXPAND,1,RECT,HALF,0,-1e-06,0,1,RECT,HALF,3,0,0, ,RECT,FULL,,,,
/EXPAND,1,RECT,HALF,0,-1e-06,0,1,RECT,HALF,2.5,0,0, ,RECT,FULL,,,,
/EXPAND,1,RECT,HALF,0,-1e-06,0,1,RECT,HALF,2.5,0,0, ,RECT,FULL,,,,
FINISH
! /EXIT,NOSAV
/BATCH
/COM,ANSYS RELEASE 2022 R1           BUILD 22.1      UP20211129       15:42:50
/input,menust,tmp,''
/GST,ON
/PLO,INFO,3
/GRO,CURL,ON
/CPLANE,1
WPSTYLE,,,,,,,,0
RESUME
/COM,ANSYS RELEASE 2022 R1           BUILD 22.1      UP20211129       15:43:50
/POST1
SET,LIST,999
SET,,, ,,, ,198
/DSCALE,ALL,0
PLESOL, NL,SRAT, 0,1.0
/DSCALE,ALL,1
PLESOL, NL,SRAT, 0,1.0
PLESOL, NL,SRAT, 0,1.0
/EFACET,1
PLNSOL, U,SUM, 0,1.0
/EFACET,1
PLNSOL, U,SUM, 0,1.0
ESEL,S,LIVE
FINISH
! /EXIT,NOSAV
